# rings plus linear contaminants with slow insert

units           lj
atom_style      angle

read_data       rings.dat
special_bonds   lj 1.0 1.0 1.0

mass            1 1.0

velocity        all create 0.0 87287

pair_style      lj/cut 1.12246205
pair_modify     shift no
pair_coeff      1 1 1.0 1.0 1.12246205

bond_style      fene
bond_coeff      1 30.0 1.5 0.0 0.0

angle_style     cosine/squared
angle_coeff     1 0.75 180.0

neighbor        0.4 bin
neigh_modify    every 1 delay 0 check yes

timestep        0.001

thermo          10
thermo_style    custom step temp press pxy etotal ke epair ebond eangle
thermo_modify   flush yes norm no

fix             1 all nve
#fix             2 all langevin 1.0 1.0 1.0 699483

run 200
